*include, inp=sph_param.inp
*Heading
** Job name: sph_axi16Aug22 Model name: Model-1
** Generated by: Abaqus/CAE 2019
*Preprint, echo=NO, model=NO, history=NO, contact=NO
**
** PARTS
**
*Part, name=Part-1
*Node
      1,  0.150000006,           0.
      2, 0.00749999983,           0.
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*Element, type=CAX4
  1,  43, 676, 241,  42
  2, 118, 119, 291, 289
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*Nset, nset=Set-ECM
    1,    2,    3,    4,    5,    6
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*Elset, elset=Set-ECM, generate
    1,  1161,     1
*Nset, nset=Set-sph
    2,    3,    8,    9,   30,   31
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*Elset, elset=Set-sph, generate
 1162,  1368,     1
*Nset, nset=EDGESET
 2
** Section: Section-1
*Solid Section, elset=Set-ECM, material=Material-e
,
** Section: Section-2
*Solid Section, elset=Set-sph, material=Material-s
,
*End Part
**
**
** ASSEMBLY
**
*Assembly, name=Assembly
**
*Instance, name=Part-1-1, part=Part-1
*End Instance
**
*Nset, nset=Set-1, instance=Part-1-1
   1,   4,   5,   6,   7,  89
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*Elset, elset=Set-1, instance=Part-1-1
   2,  15,  17,  19,  46,  51
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*Nset, nset=Set-bnd, instance=Part-1-1
   3,   4,   7,   8,   9,  69
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*Elset, elset=Set-bnd, instance=Part-1-1
   13,   37,   39,   43,   48,   49
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*Nset, nset=EDGESET, instance=Part-1-1
 2
*End Assembly
**
** MATERIALS
**
*Material, name=Material-e
*hyperelastic, neohooke
 ** 0.00011, 4138
** 0.00016, 2824
** 0.00021, 2182
<C10>, <D1>
**
*Material, name=Material-s
*Depvar
    20,
*User Material, constants=12
 0.00017, 85 ,2, 0.89, 2.20e-3, 0.077, <pcA>, <pcB>,
 <pc6>, <xA>, <xB>, <x6>
 **
** 0.00017, 85 ,2, 0.89, 2.20e-3, 0.077, 0.78, -0.57, 0.22
** 0.00017, 85 ,2, 0.89, 2.20e-3, 0.077, 0.28, -0.80, 0.65
** C10, D1, iswitch, tau, p0, beta, xTNF, xTGF, xIL
**
*Boundary
Set-1, 1, 1
Set-1, 2, 2
Set-1, 6, 6
Set-bnd, 1, 1
** ----------------------------------------------------------------
**
** STEP: Step-1
**
*Step, name=Step-1, nlgeom=YES, inc=1000
*Static
1e-3, 7., 1e-05, 0.05
**
** BOUNDARY CONDITIONS
**
**
** OUTPUT REQUESTS
**
*Restart, write, frequency=0
**
*Output, field, frequency=1
*node Output
RF,U, coord
**
*Output, field, frequency=1
*Element Output, directions=YES
S, EVOL, LE, SDV
*End Step
