*Heading
** Job name: sph_axi_Pres Model name: Model-1
** Generated by: Abaqus/CAE 2019
*Preprint, echo=NO, model=NO, history=NO, contact=NO
**
** PARTS
**
*Part, name=Part-1
*Node
      1,  0.150000006,           0.
      2, 0.00749999983,           0.
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*Element, type=CAX4
  1, 190,  37,  38, 188
  2,  98,  99, 240, 238
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*Nset, nset=Set-ECM
    1,    2,    3,    4,    5,    6
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*Elset, elset=Set-ECM, generate
    1,  1040,     1
*Nset, nset=Set-sph
    2,    3,    8,    9,   30,   31
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*Elset, elset=Set-sph, generate
 1041,  1137,     1
** Section: Section-1
*Solid Section, elset=Set-ECM, material=Material-e
,
** Section: Section-2
*Solid Section, elset=Set-sph, material=Material-s
,
*End Part
**
**
** ASSEMBLY
**
*Assembly, name=Assembly
**
*Instance, name=Part-1-1, part=Part-1
*End Instance
**
*Nset, nset=Set-1, instance=Part-1-1
   1,   4,   5,   6,   7,  69
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*Elset, elset=Set-1, instance=Part-1-1
   2,  15,  17,  19,  37,  42
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*Nset, nset=Set-3, instance=Part-1-1
   3,   4,   7,   8,   9,  49
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*Elset, elset=Set-3, instance=Part-1-1
   13,   31,   33,   39,   40,   44
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*Nset, nset=Set-4, instance=Part-1-1
  4,  5, 69, 70, 71, 72
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*Elset, elset=Set-4, instance=Part-1-1
  15,  17,  37,  42,  46,  49
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*Nset, nset=Set-5, instance=Part-1-1
   1,   5,   6,  88,  89,  90
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*Elset, elset=Set-5, instance=Part-1-1
   2,  19,  52,  54,  56,  57
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*Nset, nset=Set-6, instance=Part-1-1
   6,   7, 126, 127, 128, 129
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*Elset, elset=Set-6, instance=Part-1-1
 531, 532, 547, 554, 555, 556
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*Nset, nset=Set-bnd, instance=Part-1-1
   3,   4,   7,   8,   9,  49
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*Elset, elset=Set-bnd, instance=Part-1-1
   13,   31,   33,   39,   40,   44
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*Elset, elset=_Surf-1_S2, internal, instance=Part-1-1
 531, 532, 554, 555, 556, 560, 561, 562, 648, 659, 680, 686
*Elset, elset=_Surf-1_S1, internal, instance=Part-1-1
 547,
*Elset, elset=_Surf-1_S4, internal, instance=Part-1-1
 557, 558, 559, 563, 655, 662, 664
*Surface, type=ELEMENT, name=Surf-1
_Surf-1_S2, S2
_Surf-1_S1, S1
_Surf-1_S4, S4
*End Assembly
**
** MATERIALS
**
*Material, name=Material-e
*hyperelastic, neohooke
 0.00011, 4138
** 0.00016, 2824
** 0.00021, 2182
**
*Material, name=Material-s
*Depvar
    20,
*User Material, constants=6
0.00017, 85 ,2, 0.89, 2.2e-3, 0.077
** C10, D1, iswitch, tau, p0, beta
**
**AMPLITUDE
*amplitude, name = amp1
0,0,1,1,7,1
**
** BOUNDARY CONDITIONS
**
** Name: BC-1 Type: Displacement/Rotation
*Boundary
Set-3, 1, 1
** Name: BC-2 Type: Displacement/Rotation
*Boundary
Set-4, 1, 1
** ----------------------------------------------------------------
**
** STEP: Step-1
**
*Step, name=Step-1, nlgeom=YES, inc=1000
*Static
1e-3, 7., 1e-05, 0.05
**
** BOUNDARY CONDITIONS
**
** Name: BC-2 Type: Displacement/Rotation
*Boundary
Set-4, 2, 2
** Name: BC-3 Type: Displacement/Rotation
*Boundary
Set-5, 1, 1
**
**
** LOADS
**
** Name: Load-1   Type: Pressure
*Dsload, amplitude = amp1
Surf-1, P, 0.0002
**
** OUTPUT REQUESTS
**
*Restart, write, frequency=0
**
*Output, field, frequency=1
*node Output
RF,U, coord
**
*Output, field, frequency=1
*Element Output, directions=YES
S, EVOL, LE, SDV
*End Step
